# AguaClara Water Treatment Plants
# Automated Design
# User Inputs:
HW_Sed := 2.1 m
# Design References
# [reference: UserInputs- test.xmcd]
# [reference: DesignAssumptions-test.xmcd]
# [reference: MathFunctions.xmcd]
# [reference: PipeDatabase.xmcd]
# [reference: MinorLossCoefficients.xmcd]
# [reference: FluidsFunctions.xmcd]
# Inlet Channel:
# [reference: Inlet Channel.xmcd]
W_InletChannel = 0.687996 m
L_Channel = 7.377 m
ND_SedPipeEntrance = 12 in
N_SedInletPipes = 8
H_InletChannel = 1.18893 m
Q_Plant = 800 gal/min
# Sedimentation Tanks:
# [reference: Sedimentation-gracias 1W test.xmcd]
N_SedTanks = 6
H_SedBelowSlope = 1.38778 m
H_SedBetween = 0.0762 m
HW_Sed = 2.1 m
H_Sed = 2.2 m
H_SedBelow = 1.46398 m
L_Sed = 9.6182 m
ND_SedPipeEntrance = 12 in
# Sedimentation Tank Sludge Drain:
# [reference: SludgeDrain.xmcd]
N_SedSludgeOrifices = 96
ND_SedSludge = 6 in
Q_SludgeDrainInitial = 1453.6 L/min
D_SedSludgeOrifice = 0.1875 in
# Sedimentation Tank Inlet Slopes:
# [reference: Sed. Inlet Slopes- minV.xmcd]
B_SedInlet = 3.80249 cm
L_SedTopFilled = 0.211377 m
H_SedInlet = 11.1177 cm
W_SlopesFilled = 0.105688 m
L_SedBottomFilled = 0.137966 m
AN_SedTopInlet = 60 deg
L_SedTopInletTotal = 1.0795 m
AN_SedBottom = 40 deg
A_SedInlet = 841.203 cm^2
H_SedTopInletTotal = 0.934874 m
H_SedTopInlet = 75.1817 cm
L_SedBottomTotal = 0.704594 m
H_SedInletSlopes = 103.487 cm
L_SedTopInlet = 0.868123 m
W_SlopesV = 0.434062 m
H_SedBottom = 0.364221 m
# Sedimentation Tank Effluent Launder:
# [reference: Launder.xmcd]
N_SedLaunderOrifices = 160
Q_SedLaunderOrifices = 1.57725 L/min
# Exit Channel:
# [reference: Exit Channel.xmcd]
W_ExitChannel = 0.687996 m
ND_SedLaunder = 6 in
H_ExitChannel = 1.18893 m
L_SedLaunder = 8.09221 m
L_ExitChannel = 7.377 m
D_SedLaunderOrifice = 0.3125 in
H_PltWeir = 0.953957 m
Z_SedLaunder = 1.97586 m
HW_ExitChannel = 1.04893 m
# Lamella:
# [reference: Lamella.xmcd]
L_SedPlate = 0.989406 m
B_SedPlate = 5.29119 cm
S_SedPlate = 4.99119 cm
N_SedPlates = 123
AN_SedPlate = 60 deg
V_SedC = 10.0054 m/day
V_SedUp = 70 m/day
H_SedPlate = 0.856851 m
H_SedAbove = 0.208275 m
# Flow Controller:
# [reference: FCM.xmcd]
N_Fcm = 6
ID_FcmTube = 4.318 mm
ID_FcmTube = 0.17 in
L_FcmTube = 255.151 cm
Q_FcmTubeMax = 378.541 mL/min
HL_FcmValve = 26.6223 cm
# Flocculator:
# [reference: Flocculation.xmcd]
W_FlocChannel = 0.53975 m
S_FlocBaffle = [0.386239; 0.462041; 0.612545; 1.57366] m
B_FlocBaffle = [0.390239; 0.466041; 0.616545; 1.57766] m
N_FlocBafflesMin = 19
HL_Floc = 7.89618 cm
X_FlocBaffles = [
    0.68975, 8.02954;
    1.07999, 6.45189;
    1.47023, 4.87423;
    1.86047, 3.29657;
    2.32651, 1.71892;
    2.79255, 0;
    3.25859, 0;
    3.87513, 0;
    4.49168, 0;
    5.10822, 0;
    6.68588, 0
] m
HW_FlocStart = 2.17896 m
L_FlocBaffles = [
    1.71376, 0.526344;
    1.81376, 0.626344;
    1.71376, 0.526344;
    1.81376, 0.626344;
    1.63796, 0.526344;
    1.73796, 0;
    1.63796, 0;
    1.58746, 0;
    1.48746, 0;
    1.58746, 0;
    0.526344, 0
] m
W_FlocPort = 1.57366 m
H_FlocPort = 0.53975 m
N_FlocBaffles = 16
Z_FlocBaffles = [
    0, 0;
    0.386239, 1.57366;
    0, 0;
    0.386239, 1.57366;
    0, 0;
    0.462041, 0;
    0, 0;
    0.612545, 0;
    0, 0;
    0.612545, 0;
    0, 0
] m
Gt_FlocMinFlow = 5992.32
N_FlocChannels = 2
# Entrance Tank:
# [reference: EntranceTank.xmcd]
ND_Lfom = 20 in
HL_Rm = 0.890191 cm
N_Lfom = 1
D_LfomOrifices = 52.3875 mm
Q_LfomErrorMax = 0.74575 %
N_LfomOrifices = [5; 4; 3; 2; 2; 2; 1; 2; 1; 1]
L_Et = 3 m
W_Et = 1.5 m
HW_EtMin = 0.2 m
HW_EtMax = 0.4 m
H_Et = 2.52896 m
ZW_Et = 2.42896 m
# Any additional needed elevations should be calculated in the files above.
# AutoCAD References
# [reference: basics.xmcd]
# [reference: pipe.xmcd]
# [reference: tank.xmcd]
# [reference: lamina.xmcd]
# [reference: cross.xmcd]
# [reference: Tee.xmcd]
# [reference: elbow.xmcd]
# [reference: Sludge.xmcd]
# [reference: Channel.xmcd]
# [reference: Manifold.xmcd]
# [reference: SedTankslopes.xmcd]
# [reference: Sed Tank Inlet Slope.xmcd]
# [reference: chemicalstock.xmcd]
# [reference: Sedimentation Tank.xmcd]
# [component: inputs SedTank]
# [reference: Flocculation Tank.xmcd]
# [component: inputs FlocTank]
# [reference: Entrance Tank.xmcd]
# [component: inputs EntranceTank]
