# AguaClara Design Tool
C_ChlorineDoseMax := 2*mg/L
C_ChlorineStock := 50*gm/L
Ti_ChlorineStock := 30 hr
Country := 0  # Needs to be redefined as zero until we create a database for all countries.
Q_Plant := □  # error: This placeholder is empty.
## References
# MathCAD dimension calculations:
# [reference: BasicInputs.xmcd]
N_SedTanks := 2
Q_Plant := 6*L/s
N_SedBays := 1
N_SedBaysEst :=
    2 if Q_Plant ≥ 12*L/s
    1 otherwise
N_SedBaysEst = 1
N_SedTanks :=
    ceil(Q_Plant/(N_SedBaysEst*3.01*L/s)) if Q_Plant ≤ 30*L/s
    ceil(Q_Plant/(N_SedBaysEst*5.5*L/s)) otherwise
N_SedTanks = 2
# [reference: ExpertInputs.xmcd]
# [reference: MathFunctions.xmcd]
# [reference: PipeDatabase.xmcd]
# [reference: FluidsFunctions.xmcd]
# [reference: SedimentationTank.xmcd]
# [reference: Flocculator.xmcd]
# [reference: LFOM.xmcd]
# [reference: LinearCdc.xmcd]
# [reference: ChemStorageTanks.xmcd]
# [reference: EntranceTank.xmcd]
# [reference: StackedRapidSandFilter.xmcd]
# [reference: MaterialsList.xmcd]
# AutoCAD drawing programs:
# Translators:
# These are the codes that take MathCAD outputs and create AutoCAD scripts that are used to draw the plant (formerly Basics)
# [reference: MtoATranslators.xmcd]
# The wrapped MtoA translator contains the functions that the user will want to access. These functions will draw pieces with full functionality - specifying the location, dimension, and orientation of the object. Also, it contains layer control and subtraction capabilities for grouped objects.
# [reference: MtoATranslatorsWrapped.xmcd]
# Drawing functions:
# [reference: ChannelF.xmcd]
# [reference: PlumbingF.xmcd]
# [reference: TankF.xmcd]
# [reference: StairsF.xmcd]
# [reference: DrainChannelF.xmcd]
# AutoCAD Script Files:
# [reference: FlocculatorAC.xmcd]
# [reference: SedimentationTankAC.xmcd]
# [reference: EntranceTankAC.xmcd]
# [reference: ChemStockTanksAC.xmcd]
# [reference: StackedRapidSandFilterAC.xmcd]
# [reference: CdcAC.xmcd]
# [reference: OperatorAccessAC.xmcd]
# [reference: MaterialsAC.xmcd]
# Layouts:
# This file will execute at the very end to create multiple views of the entire plant in paperspace
# [reference: LayoutsAC.xmcd]
## All variables displayed must have the standard SI units. They may not have units attached by the user.
# General
Q_Plant = 0.006 m^3/s
Pi_VenaContractaOrifice = 0.63
T_PlantWall = 0.15 m
W_SedPlate = 1.0668 m
T_ConcreteMin = 0.05 m
L_SedPlateSheet = 3 m
C_CoagStock = 180 kg/m^3
T_SedPlate = 0.002 m
Ti_CoagStock = 108000 s
T_SedWeir = 0.04 m
C_ChlorineStock = 50 kg/m^3
W_SedBay = 1.0668 m
Ti_ChlorineStock = 108000 s
HL_ChannelMax = 0.05 m  # Eliminate FCM variable from design specs
H_PlantFreeboard = 0.1 m
EN_DrillSeries = 0
# Entrance Tank
V_EtUp = 0.008 m/s
W_EtCapture = 0.234291 m
H_EtOverflowChannel =  # error: This variable is undefined.
H_Et = 0.924488 m
H_EtTop = 0.3 m  # height of the top part of the entrance tank above the hoppers
W_Et = 0.670688 m
L_Et = 4.02724 m
ND_EtDrain = 0.0762 m
HL_Lfom = 0.2 m
ZW_Et = 2.13314 m
Z_EtTop = 2.23314 m
Z_Et = 1.30865 m  # elevation of top of slab.
ND_RMPipe = 0.1524 m
Z_EtHopper = 1.93314 m
H_EtHopper = 0.624488 m
N_EtHoppers =  # error
ND_EtFlowControl = 0.0762 m
L_EtHopper = 1.45058 m
AN_EtSlope = 0.785398
W_EtDC = 0.236538 m  # drain channel under entrance tank dimensions
L_EtDC = 4.17724 m
H_EtDC = 0.276909 m  # Give heights of the channel at the beginning and end and change the design specs to explain that it's sloped.
# Flow measurement
D_LfomOrifices = 0.01905 m
S_LfomRows = 0.02 m
H_LfomOrifice = [0.009525; 0.029525; 0.049525; 0.069525; 0.089525; 0.109525; 0.129525; 0.149525; 0.169525; 0.189525] m
Q_LfomScale = [0; 0.0006; 0.0012; 0.0018; 0.0024; 0.003; 0.0036; 0.0042; 0.0048; 0.0054; 0.006] m^3/s
N_LfomOrifices = [7; 3; 2; 1; 2; 2; 1; 1; 1; 2]
ND_Lfom = 0.1524 m
HL_Lfom = 0.2 m
# Rapid Mix
ED_Tee = 0.068393 m^2/s^3
Z_LfomOrifices = 1.94267 m  # elevation of the center of
Z_EtExit =  # error  # elevation of center of pipe exiting the entrance tank and heading toward the flocculator
W_DC =  # error
# Maybe give the vertical distances below the bottom of the sed tank of the beginning and end of the channel? Calculate them, display, and add to the design specs.
H_DC =  # error
L_DC =  # error
# Plant Drain Channel
Z_CoagTank = 2.53314 m
Z_CoagTankOutlet = 2.63314 m
L_CdcFloatArm = 0.41275 m
Q_CdcMax = 1.2e-6 m^3/s
L_CdcScaleArm = 0.50165 m
C_CoagDoseMax = 0.06 kg/m^3
B_StockOutlet = 0.1 m
L_CoagCdcTube = 1.58476 m
D_CdcTube = 0.003175 m
N_CoagCdcTubes = 1
HL_Cdc = 0.2 m
L_CdcFloatArm = 0.41275 m
L_CdcScaleArm = 0.50165 m
# Coag Dose Controller
# Flocculator
H_Floc = 1.84601 m
Z_FlocTank = 0 m  # Look at Flocculator Positioning arrays
N_FlocValves = 1
W_FlocChannel = 0.59 m
Ti_Floc =  # error  # Fill last channel with bafffles from last channel
H_FlocSlope = 0.0301625 m  # Fix port width to be based on energy dissipation in that channel
ED_Floc = 0.01 m^2/s^3
# Adjust spacing after the number of baffles per channel is known.
V_Floc = 0.0768623 m/s  # Check the residence time of the flocculator should be at least 20minutes
HW_FlocEnd = 1.70158 m
ND_FlocValve = 0.0508 m
CP_Floc = 75 m^(2/3)
Ti_FlocDrain = 1800 s
CP_FlocTotal =  # error
N_FlocChannels = 2
G_Floc =  # error
L_FlocTank =  # error
HL_Floc = 0.0444291 m
ED_FlocChannelFirst =  # error
HW_FlocStart = 1.74601 m
S_FlocBaffle = [0.132308; 0.132308] m
B_FlocBaffle = [0.134308; 0.134308] m
N_FlocChannelBaffles = [29; 26]
W_FlocPort = [0.112308; 0.28415] m
S_FlocBaffleFirst =  # error
HL_FlocChannels =  # error
L_FlocBaffleLower = 1.50312 m
L_FlocBaffleUpper = 1.59755 m
H_FlocPort = [1.0426; 1.0426] m
Ti_Floc =  # error  # residence time of the flocculator
N_FlocBaffles =  # error
ND_FlocValve = 2 in
EN_FlocBaffle = 1
# Sed Tanks
N_SedTanks = 2
L_Sed = 4.02724 m
N_SedBays = 1  # Number of bays of inlet manifolds in each sed tank
Q_SedBay = 0.003 m^3/s
V_SedUpBod = 0.001 m/s  # design constraints
V_SedCBod = 0.00012 m/s
V_SedUp = 0.000962047 m/s  # Actual values from this design
V_SedC =  # error
W_SedSideSlopes = 0.52505 m
AN_SedSlope = 0.872665
Ti_Sed = 1863.77 s
# Sedimentation Tank Sludge Drain:
N_SedSludgeOrifices = 27  # per cell
Ti_SludgeDrain = 1800 s  # Tank Drain time
W_SedSludge = 0.0690009 m  # Width of the sludge channel
H_SedSludge = 0.0690009 m  # Depth of the sludge channel
# Distance center to center between drain orifices
B_SedSludgeOrifices = 0.10804 m
W_SedDrainCover = 0.109001 m
D_SedSludgeOrifice = 0.00942289 m  # Diameter of drain orifices
N_SedSludgeOrifices = 27
ND_SedSludgePipe = 0.0762 m
# Sedimentation Tank Dimensions:
Z_SedSludge = 0.0690009 m  # Height from 0 of the top of the sludge drain
Z_SedSideSlopes = 0.761431 m
W_Sed = 1.0668 m  # Total tank wall height
L_Sed = 4.02724 m  # Total tank length
H_Sed = 1.80158 m
# Sedimentation Tank Inlet Channel:
EN_InletChannelGeom = 1
HW_SedInletChannel = 0.231177 m
W_SedInletChannel = 0.47415 m
L_SedChannel = 2.2836 m
H_SedInletChannel = 0.331177 m
HL_SedWeirInlet = 0.0125894 m
W_SedInletChannelPreWeir = 0.28415 m
H_SedWeirInlet = 0.218587 m
W_SedWeirInlet = 2.2836 m
# Sedimentation Tank Effluent Launder:
N_SedLaunderOrifices = 27  # Number of orifices per launder
N_SedLaunderOrificesRow =  # error  # Number of orifices per row
Z_SedLaunder = 1.5847 m
Q_SedLaunderOrifices = 0.000111111 m^3/s
B_SedLaunderOrifices = 0.1 m  # Center to center launder spacing
# More Launder Dimensions
ND_SedLaunder = 0.1016 m
D_SedLaunderOrifice = 0.015875 m
L_SedLaunder = 2.92782 m
HL_SedLaunderOrifice = 0.0404807 m
# Sedimentation Tank Inlet Manifold:
ND_SedManifold = 0.1524 m
L_SedManifoldDiffuser = 0.156624 m
Z_SedManifoldPipe = 0.369579 m
ND_SedDiffuser = 0.0254 m
D_SedManifoldPort = 0.03175 m
B_SedManifoldPort = 0.05 m
N_SedManifoldPorts = 57
L_SedManifoldPipe = 2.94309 m
ED_SedInlet = 0.01 m^2/s^3
Q_SedManifoldPort = 5.26316e-5 m^3/s
# Exit Channel:
W_SedExitChannel = 0.34 m
H_SedExitChannel = 0.331177 m
HW_SedExitChannel = 0.191177 m  # water height in exit channel from base of channel
H_SedWeirExit = 0.178587 m
# Lamella:
L_SedPlate = 0.5 m
B_SedPlate = 0.027 m  # center to center distance between lamella
S_SedPlate = 0.025 m  # spacing between lamella
N_SedPlates = 95  # Number of Sed Plates per Sedimentation Tank Bay.
N_SedModules = 19  # Number of modules per bay
N_SedModulePlates = 5  # Number of plates per module
AN_SedPlate = 1.0472
L_SedActive = 2.9595 m
Z_SedLaunder = 1.5847 m
HW_Sed = 1.70158 m
H_Sed = 1.80158 m
# SRSF
H_Fi = 4.19879 m
L_Fi = 0.782393 m
W_Fi = 0.865437 m
B_FiManifoldBranch = 0.1 m
ND_FiTrunk = 0.0762 m
ND_FiManBranch = 0.0254 m
ND_FiBwTrunk = 0.1524 m
ND_FiBwManBranch = 0.0381 m
ND_FiExitWaste = 0.0508 m
ND_FiBwWeirDrain =  # error
ND_FiBwDrain =  # error  # For the box that holds keeps the end of the siphon submerged
ND_FiSandOutlet = 0.0508 m
Ti_FiSand = 332.229 s  # This is the time required to empty the filter of the sand.
ND_FiSiphonAirValve = 0.0127 m
ND_FiSiphon = 0.1524 m
Q_FiSiphonMax =  # error
B_FiSiphonManOrifices = 0.149561 m
N_FiSiphonManOrifices = 4
D_FiSiphonManOrifices = 0.0772541 m
Ti_FiBwInitiation =  # error
H_FiSand = 1.24083 m
N_FiLayer = 6
H_FiLayer = 0.2 m
V_FiLayer = 0.00183333 m/s
HL_FiTerminal = 0.455621 m
V_FiBw = 0.011 m/s
HL_FiBwInitiation = 1.42842 m
HL_FiBwSS = 1.22842 m
D_FiSand =  # error
N_Fi = 1
Q_Fi = 0.006 m^3/s
W_Slots =  # error
B_FiBwManSlot = 0.0047625 m
L_FiBwManSlot =  # error
B_FiManSlot = 0.0047625 m
L_FiManSlot =  # error
N_FiSlotRows = 2
Z_FiBottom = -2.57212 m
Z_FiTop = 1.62667 m
# Weirs
HL_FiWeir =  # error
L_FiWeir =  # error
Z_FiEntranceWeir = 1.49937 m
Z_FiBwWeir =  # error
Z_FiSiphonInlet = -0.759039 m  # This is the centerline elevation of the siphon orifices
Z_FiExitWeir =  # error
Z_FiExitBottom = 0.531389 m  # bottom of the filtered water box
Z_FiEntranceBottom = 0.531389 m  # bottom of the entrance box
Z_FiSiphonCoupling = 0.804684 m
Z_FiBwTop =  # error
W_FiBwDrain =  # error
H_FiBwDrain =  # error
N_Launders =  # error
L_LaunderPipeTotal =  # error
N_LaunderCouplings =  # error
N_ValveCouplings = 2
N_SedPlatesTotal = 190
N_SedPlatesPerSheet = 6
N_SedPlateSheets = 32
N_Valves = 2
A_EtFloor = 4.2004 m^2
W_FlocWithWalls = 1.48 m
L_FlocWithWalls = 4.32724 m
Vol_FlocFloor = 1058.01 L
A_FlocFloor = 7.0534 m^2
Vol_SedSlopes =  # error
A_SedWalls =  # error
A_SedFloor = 11.1799 m^2
# Materials List
# Plant Summary Calculations:
HL_PlantTotal := Z_EtTop - H_PlantFreeboard - Z_FiExitWeir
HL_PlantTotal =  # error
## Display AC variables
AC_EntranceTank =  # no stored result
AC_FlocTank =  # no stored result
AC_OperatorAccess = [
    "-layer m OpWalkwayCon"; "c t 132,132,132"; "OpWalkwayCon"; "  "; "_-view o f"; "_pline"; "-7.76973,2.54584"; "-7.46973,2.54584"; "-7.46973,2.33075"; "-7.16973,2.33075"
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]
AC_SedTank =  # no stored result
AC_ChemTanks =  # no stored result
AC_Filter =  # no stored result
AC_ZZLayout := AC_Layout
AC_ZZMatApply
AC_Cdc = [
    "-layer m Cdc";
    "c t 125,0,160";
    "Cdc";
    "  ";
    "-insert https://confluence.cornell.edu/download/attachments/173604905/CdcLeverArm.dwg";
    "-3.75659,5.23187,2.25804 x 1 1  270";
    "-insert https://confluence.cornell.edu/download/attachments/173604905/CdcLeverArmBracket.dwg";
    "-4.16934,5.19987,2.23314 x 1 1  270";
    "-insert https://confluence.cornell.edu/download/attachments/173604905/CdcCht.dwg";
    "-5.34903,5.23187,2.35084 x 1 1  90"
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]
AC_ZZLayout = ["laythw -view _SEISO "]
Q_Plant = 0.006 m^3/s
