# AguaClara Design Tool
Ti_wanted := 5 min
# [reference: BasicClientInputs.xmcd]
# [reference: ExpertInputs.xmcd]
Q_Plant = 0.01 m^3/s
# [reference: DesignAssumptions.xmcd]
# [reference: MathFunctions.xmcd]
# [reference: PipeDatabase.xmcd]
# [reference: MinorLossCoefficients.xmcd]
# [reference: FluidsFunctions.xmcd]
# [reference: Sedimentation Tank.xmcd]
# [reference: Floc Hopper - New Design.xmcd]
# [reference: FCM.xmcd]
# [reference: Flocculator 3.xmcd]
# [reference: Rapid Mix.xmcd]
# [reference: EntranceTankDim.xmcd]
# [reference: Materials List.xmcd]
# [reference: ChemStorageCylinders.xmcd]
Q_Plant = 0.01 m^3/s
# [reference: AutoCADMasterProgram.xmcd]
Q_Plant = 0.01 m^3/s
AC_FlocTank = [
    "-layer m floctank";
    "c t 91,91,91";
    "floctank";
    "  ";
    "_-view o t _zoom w 0.16,2.3,0.66206 -5.99899,4.54,1.92595 _box 0,2.46,0.66206 -5.83899,4.38,1.92595 _box 0.15,2.31,0.51206 -5.98899,4.53,1.92595 _subtract 0.15,2.31,0.51206  0,2.46,0.66206 ";
    "_box -5.98899,3,0.66206 0.15,3.15,1.92595";
    "_box -0.10171,3,1.46752 0,3.15,0.66206";
    "_subtract -5.98899,3,0.66206  -0.10171,3,1.46752 ";
    "_box -5.98899,3.69,0.66206 0.15,3.84,1.92595";
    "_box -5.83899,3.69,1.46752 -5.73728,3.84,0.66206"
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]
AC_SedTank =  # no stored result
AC_ChemTanks = ["-layer m alumtanks"; "c t 132,132,132"; "alumtanks"; "  "; "_-view o t"; "_cylinder 1.55549,3.06792,5.96278 0.46208 1.37623"; "_cylinder 1.55549,3.06792,5.96778 0.45708 1.37123"; "_-view o t"; "_subtract 1.09341,3.06792,5.96278  1.09841,3.06792,5.96278 "; "_mirror all  1.54549,2.10584 1.56549,2.10584 "; "_union all "; "-layer s 0"; "  "; "-layer f alumtanks"; "  "]
# [component: inputs AC_FlocTank]
# [component: inputs AC_SedTank]
# [component: inputs AC_ChemTanks]
AC_EntranceTank = [
    "-layer m entrancetank";
    "c t 214,214,214";
    "entrancetank";
    "  ";
    "_-view o t _zoom w 2.27098,4.37,2.83139 0.84,5.80098,4.39528 _box 2.11098,4.53,2.83139 1,5.64098,4.39528 _box 2.26098,4.38,2.68139 0.85,5.79098,4.39528 _subtract 2.26098,4.38,2.68139  2.11098,4.53,2.83139 ";
    "-layer s 0";
    "  ";
    "-layer f entrancetank";
    "  ";
    "-layer s entrancetank";
    "  ";
    "-layer s 0";
    "  ";
    "-layer t entrancetank";
    "  ";
    "_-view o t";
    "-layer f entrancetank";
    "  "
]
# [component: inputs AC_EntranceTank]
