# AguaClara Water Treatment Plants
# Automated Design
# References
# Here we will reference the subprograms: Unit Processes, Hydraulic Design, AutoCAD?, and Report Generator?. In order to be able to transfer data from one subprogram to another we will need to be able to send and recieve everything through function calls.
# [reference: HydraulicDesign.xmcd]
# [reference: UnitProcesses.xmcd]
# User Inputs:
# Choose either a Pipe Schedule Number or an SDR rating:
# [component: outputs PipeSpecification]
# Engineer Entered Values: | Values used to Draw Plant:
Q_plant := 740*L/min
column_dim := [2; 2; .8]*m
# floc tank parameters
stockplatcol_dim := [20; 20; 120]*cm
n_channels := 3  # Number of channels in the flocculator
FlocTank_width := .8 m
tank_thick := 20 cm
lvltank_thick := 20 cm
stockplat_thick := lvltank_thick
# sed tank parameters
grit_thick := lvltank_thick
platform_thick := .5 m
channel_thick := 10 cm
SedTank_width := 100 cm  # Width of the lamella
drum_disp := 6 in
L_lamella := 80 cm  # length of the lamella
walkway_width := 1 m
lamella_spacing := 5 cm  # lamella spacing
# Angle of the bottom of the sed tank
# Depth between the bottom of the lamella and the bottom of the sedimentation tank
# drum parameters
r_drum := .3 m
h_drum := .7 m
# grit chamber parameters
D_drill := 1/4*in  # Diameter of drill used for orifices in grit chamber riser pipe
DrillSize := 1/4*in
# Calls Functions Here:
# Sedimentation Tank Design
# Sedimentation file returns:
# 1st column: length, width, height of the sedimentation tank + freeboard.
# 2nd column: Number of lamella
SedTank := SedTankDesign(Q_plant, SedTank_width, lamella_spacing, L_lamella) = [[3.952; 1; 1.64282], 61.5224]
# Flocculator Design
# Flocculation File returns:
# 1st column: Floc tank dimensions: Height, Width, Length
# 2nd Column: baffle spacing in each section
# 3rd column:Floc inlet
# 4th column: Number of baffles???
Flocculator := flocculator(Q_plant, FlocTank_width) = [[2; 0.8; 2], [0.396254; 0.228752; 0.177191], 1.5, [1; 1; 1]]
# Chemical Feed Design
FeedDesign := ChemicalFeed(Q_plant, Dose_Alum, r_drum, h_drum)  # disabled
# Launderer Design
b_plate := 1 m
# This table may need updated
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Laund := Launder(Q_plant, PipeSpecification, A_orifice)  # error: This function has the form: ƒ(Length, any1, any2) → any1^-1 · any2 · Length^-1 · Time, but must have the form: ƒ(Length) → Length^2.
# Sludge Pipe Design
SludgePipe := Sludge(Q_plant, PipeSpecification) = [[0.0077978; 0.010414; 0.013843; 0.0171196; 0.0224536; 0.0278638; 0.0366268; 0.0427228; 0.0547878; 0.066929; 0.082804; 0.108204; 0.134493; 0.161468; 0.211557; 0.264668; 0.314706; 0.3429; 0.3937; 0.4445; 0.4953; 0.5969], 0.00676152, 0.05]
# Channel Design
Channel(Q_plant, SedTank_width, tank_thick) = [3.4; 0.3; 1.04059] m
# Grit Chamber Design
Grit := gritchamber(Q_plant, DrillSize, r_drum, PipeSpecification) = [2, [0.531736; 1.13174; 2], 3, [31; 154; 25; 31; 29; 27; 25; 24; 22; 20], 0.134493, 0.00635]
# Plant Leveling Tank
PLT := PlantLevelingTank(Q_plant, PipeSpecification) = [3, 3, [2; 2; 2], 5]
# Plant Elevation Design
PlantElevationDesign(Q_plant, n_sedtanks, SedTank[:, 0]*m, Flocculator[:, 0]*m) = 3
# Constructing Table:
headerrow := ["Parameter"; "Value"; "Units"]
headercolumn := [
    "Number of Sedimentation Tanks";
    "Lamella Spacing in Sedimentation Tank";
    "Baffle Spacing 1 in Flocculator";
    "Height of Inlet Pipe into Flocculator";
    "Number of baffles in Flocculator Section 1";
    "Water level in Plant";
    "Depth of Manifold";
    "Diameter of orifices in";
    "Number of holes in risers in grit chamber";
    "Inner Radius of Waste pipe";
    "Inner Radius of Effluent pipe";
    "Length of Sed. Pipe";
    "Waterlevel in plant leveling tank";
    "Wall Displacement";
    "Orifice spacing?"
]
Units := ["meter"; " "; "meter"; "meter"; " "; "meter"; "meter"; "meter"; "meter"; " "; "meter"; "meter"; "meter"; "meter"; "meter"; "meter"]
Z := [
    DataDump1[1];
    DataDump1[2];
    DataDump1[4][0];
    DataDump1[5];
    DataDump1[6][0];
    PlantElevation;
    Laund[:, 3];
    Laund[:, 1];
    Grit[:, 2];
    SludgePipe[:, 0];
    LvlTank[:, 3];
    Laund[:, 0];
    LvlTank[:, 0];
    LvlTank[:, 1];
    Laund[:, 2]
]  # error: This variable is undefined.
length(headercolumn) = 15
length(Z) =  # error: This variable is undefined.
table(headerrow, headercolumn, Z) :=
    for i ∈ 0 .. length(headercolumn)
        for j ∈ 0 .. last(headerrow)
            table[i, j] ← headerrow[j] if i == 0
            otherwise
                table[i, j] ← headercolumn[i - 1] if j == 0
                table[i, j] ← Z[i - 1] if j == 1
                table[i, j] ← Units[i - 1] if j == 2
    return table
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headercolumn_Dim := [" Sedimentation Tank"; "Dimensions of Flocculator"; "Dimensions of Grit Chamber"; "Dimensions of Leveling Tank"; "Dimensions of Channel"]
headerrow_Dim := ["Component"; "Length"; "Width"; "Height"; "Units"]
Dim_y := [DataDump1[0][1]; DataDump1[3][1]; 5; Grit[:, 1][0][1]; ChannelDim[1]]  # error: This variable is undefined.
Dim_z := [DataDump1[0][2]; DataDump1[3][2]; 5; Grit[:, 1][0][2]; ChannelDim[2]]  # error: This variable is undefined.
Dim_x := [DataDump1[0][0]; DataDump1[3][0]; 5; Grit[:, 1][0][0]; ChannelDim[0]]  # error: This variable is undefined.
Units2 := ["meter"; "meter"; "meter"; "meter"; "meter"]
tableDim(headerrow_Dim, headercolumn_Dim, Dim_x, Dim_y, Dim_z, Units2) :=
    for i ∈ 0 .. length(headercolumn_Dim)
        for j ∈ 0 .. last(headerrow_Dim)
            tableDim[i, j] ← headerrow_Dim[j] if i == 0
            otherwise
                tableDim[i, j] ← headercolumn_Dim[i - 1] if j == 0
                tableDim[i, j] ← Dim_x[i - 1] if j == 1
                tableDim[i, j] ← Dim_y[i - 1] if j == 2
                tableDim[i, j] ← Dim_z[i - 1] if j == 3
                tableDim[i, j] ← Units[i - 1] if j == 4
    return tableDim
# Table of Parameters:
# top
# [component: inputs table(headerrow, headercolumn, Z)]
# [component: inputs tableDim(headerrow_Dim, headercolumn_Dim, Dim_x, Dim_y, Dim_z, Units2)]
